// COMSOL Multiphysics 5.5.0.306 model "verticalPlate.mph"
// Outline of the model tree

Probes
  dom1: Domain "Domain Probe 1" on all domains | expr = T; unit = degC; descr = Temperature; table = tbl1

Geometry
  geom1 "Geometry 1" (2D, length unit m)
    r1: Rectangle "solid" | size = {2.5e-3, 12.4e-2}
    fin: Finalize "Form Union"

Materials
  mat1: Common "Aluminum" on all domains
    def "Basic"
      relpermeability = 1
      heatcapacity = 900[J/(kg*K)]
      thermalconductivity = 238[W/(m*K)]
      electricconductivity = 3.774e7[S/m]
      relpermittivity = 1
      thermalexpansioncoefficient = 23e-6[1/K]
      density = 2700[kg/m^3]
    Enu "Young's modulus and Poisson's ratio"
      youngsmodulus = 70e9[Pa]
      poissonsratio = 0.33
    Murnaghan
      l = -2.5e11[Pa]
      m = -3.3e11[Pa]
      n = -3.5e11[Pa]
    Lame "Lamé parameters"
      lambLame = 5.1e10[Pa]
      muLame = 2.6e10[Pa]

Physics
  ht: HeatTransfer "Heat Transfer in Solids" on all domains
    dependent variable T
    PhysicalModelProperty.IsothermalDomain = 0
    solid1: SolidHeatTransferModel "Solid 1" (default)
      k_mat = userdef
      k = 237
      rho_mat = userdef
      rho = 2669.6329254727475
      Cp_mat = userdef
      Cp = 0.91e3
    init1: init "Initial Values 1" (default) | Tinit = 341.51[K]
    ins1: ThermalInsulation (default)
    sym1: Symmetry on boundaries 1
    hf1: HeatFluxBoundary "Heat Flux 1" on boundaries 4
      HeatFluxType = ConvectiveHeatFlux
      HeatTransferCoefficientType = ExtNaturalConvection
      Lwall = 12.4e-2
      Text = 23.5[degC]
    sar1: SurfaceToAmbientRadiation on boundaries 2-4 | epsilon_rad_mat = userdef; epsilon_rad = 0.96; Tamb = 23.5[degC]

Mesh
  mesh1 "Mesh 1" (physics-controlled)
    size: MeshSizeDefault | hauto = 1

Studies
  std1 "Study 1"
    time: Transient "Time Dependent" | tunit = min; tlist = range(0,1,35)

Solver configurations
  sol1 "Solution 1" (study std1)
    v1: Variables "Dependent Variables 1"
    t1: Time "Time-Dependent Solver 1"
      tlist = range(0,1,35)
      atolmethod = {comp1_T, global}
      atolvaluemethod = {comp1_T, factor}
      atol = {comp1_T, 1e-3}
      maxorder = 2
      estrat = exclude
      fc1: FullyCoupled
        linsolver = d1
        maxiter = 5
        damp = 0.9
        jtech = once
        stabacc = aacc
        aaccdim = 5
        aaccmix = 0.9
        aaccdelay = 1
      d1: Direct "Direct, Heat Transfer Variables (ht)" | linsolver = pardiso; pivotperturb = 1.0E-13

Datasets
  dset1: Solution | solution = sol1
  dset2: Solution "Probe Solution 2" | solution = sol1
  avh1: Average "Domain Probe 1" on domains 1 | data = dset2

Derived values
  pev1: EvalPoint "Domain Probe 1" | data = avh1; table = tbl1; expr = T

Tables
  tbl1: Table "Probe Table 1"
    Time (min) | Temperature (degC), Average: Domain Probe 1 {avh1}
    0 | 68.3596
    0.035 | 68.1553
    0.07 | 67.952
    0.14 | 67.5483
    0.28 | 66.7599
    0.56 | 65.2531
    1.12 | 62.4792
    2.24 | 57.73
    3.36 | 53.6472
    5.6 | 47.4207
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
Plots
  pg1: PlotGroup2D "Temperature (ht)" | data = dset1
    surf1: Surface | expr = T
  pg2: PlotGroup2D "Isothermal Contours (ht)" | data = dset1
    con1: Contour | expr = T; levelrounding = off
  pg4: PlotGroup1D "Probe Plot Group 4"
    tblp1: Table "Probe Table Graph 1" | table = tbl1; xaxisdata = auto; plotcolumns = 2

Exports
  plot1: Plot
    filename = /media/ami/laja/projects/numericalTechniquesForProcessModelling/2020/exercises/exercise5_ode/comsolCorrelation.txt